// SBML level 2 version 4

model GP2_population_level()
  // GP2 population level

  // Compartments:
  compartment Ext = 1000000000;
  compartment IntA in Ext = 1000;
  compartment IntB in Ext = 1000;

  // Species:
  species C14a in IntA = 0;
  species C14Ra in IntA = 0;
  species mC14Ra in IntA = 0;
  species C14Compa in IntA = 0;
  species DimC14a in IntA = 0;
  species RNAPa in IntA = 1800/IntA;
  species Pc14ra in IntA = 10/IntA;
  species C4a in IntA = 0;
  species Pc4ra in IntA = 10/IntA;
  species mC4Ra in IntA = 0;
  species C4Ra in IntA = 0;
  species C4Compa in IntA = 0;
  species DimC4a in IntA = 0;
  species Pcina in IntA = 20/IntA;
  species PcinC14a in IntA = 0;
  species STARa in IntA = 0;
  species Prhla in IntA = 20/IntA;
  species PrhlC4a in IntA = 0;
  species antiSTARa in IntA = 0;
  species STARseqa in IntA = 0;
  species Pad1a in IntA = 30/IntA;
  species Pstarad1a in IntA = 0;
  species mGP2a in IntA = 0;
  species preGP2a in IntA = 0;
  species GP2a in IntA = 0;
  species GP2RNAPa in IntA = 0;
  species mRNAPa in IntA = 0;
  species C4b in IntB = 0;
  species C4Rb in IntB = 0;
  species C4Compb in IntB = 0;
  species DimC4b in IntB = 0;
  species RNAPb in IntB = 1800/IntB;
  species Pc4rb in IntB = 10/IntB;
  species mC4Rb in IntB = 0;
  species C14b in IntB = 0;
  species Pc14rb in IntB = 10/IntB;
  species mC14Rb in IntB = 0;
  species C14Rb in IntB = 0;
  species C14Compb in IntB = 0;
  species DimC14b in IntB = 0;
  species Pcinb in IntB = 20/IntB;
  species PcinC14b in IntB = 0;
  species antiSTARb in IntB = 0;
  species Prhlb in IntB = 20/IntB;
  species PrhlC4b in IntB = 0;
  species STARb in IntB = 0;
  species STARseqb in IntB = 0;
  species Pad1b in IntB = 30/IntB;
  species Pstarad1b in IntB = 0;
  species mGP2b in IntB = 0;
  species preGP2b in IntB = 0;
  species GP2b in IntB = 0;
  species GP2RNAPb in IntB = 0;
  species mRNAPb in IntB = 0;
  species C14ext in Ext = 0;
  species C4ext in Ext = 0;

  // Parameters:
  C4_diff = 3;
  alpha = 1;
  Ka = 1000000000;
  Ra = 0.011552453;
  beta = 1;
  Kb = 1000000000;
  Rb = 0.023;
  C14_diff = 2.1;

  // Rate rules:
  IntA' = Ra*IntA*(1 - (IntA + alpha*IntB)/Ka);
  IntB' = Rb*IntB*(1 - (IntB + beta*IntA)/Kb);
  Ra' = -Ra*GP2a/1000000;
  Rb' = -Rb*GP2b/1000000;

  // Reactions:
  C14_production_A: => C14a; k_C14a;
    k_C14a = 20;
  C14_diffusion_A: C14a -> C14ext; C14_diff*(C14a - C14ext);
  C14_complex_formation_A: C14a + C14Ra -> C14Compa; kf_C14Compa*C14a*C14Ra - kr_C14Compa*C14Compa;
    kf_C14Compa = 0.25; kr_C14Compa = 10;
  C14_complex_dimerization_A: 2 C14Compa -> DimC14a; kf_DimC14a*C14Compa^2 - kr_DimC14a*DimC14a;
    kr_DimC14a = 1; kf_DimC14a = 50000000;
  mC14R_transcription_A: RNAPa + Pc14ra => RNAPa + Pc14ra + mC14Ra; k_mC14Ra*RNAPa*Pc14ra;
    k_mC14Ra = 2.23;
  C14R_translation_A: mC14Ra => C14Ra; k_C14Ra*mC14Ra;
    k_C14Ra = 2.99;
  C14R_degradation_A: C14Ra => ; C14R_degradation_A_d_C14Ra*C14Ra;
    C14R_degradation_A_d_C14Ra = 0.002;
  mC14R_degradation_A: mC14Ra => ; d_mC14Ra*mC14Ra;
    d_mC14Ra = 0.139;
  C14_complex_degradation_A: C14Compa => ; C14_complex_degradation_A_d_C14Ra*C14Compa;
    C14_complex_degradation_A_d_C14Ra = 0.002;
  C14_degradation_A: C14a => ; d_C14a*C14a;
    d_C14a = 0.000283333333;
  C14_degradation_external: C14ext => ; d_C14ext*C14ext;
    d_C14ext = 0.000283333333;
  DimC14_degradation_A: DimC14a => ; d_DimC14a*DimC14a;
    d_DimC14a = 0.002;
  C4_diffusion_A: C4ext -> C4a; C4_diff*(C4ext - C4a);
  mC4R_transcription_A: RNAPa + Pc4ra => RNAPa + Pc4ra + mC4Ra; k_mC4Ra*RNAPa*Pc4ra;
    k_mC4Ra = 2.23;
  C4R_translation_A: mC4Ra => C4Ra; k_C4Ra*mC4Ra;
    k_C4Ra = 2.99;
  C4_complex_formation_A: C4a + C4Ra -> C4Compa; kf_C4Compa*C4a*C4Ra - kr_C4Compa*C4Compa;
    kf_C4Compa = 0.25; kr_C4Compa = 10;
  C4_complex_dimerization_A: 2 C4Compa -> DimC4a; kf_DimC4a*C4Compa^2 - kr_DimC4a*DimC4a;
    kf_DimC4a = 50000000; kr_DimC4a = 1;
  C4_degradation_A: C4a => ; d_C4a*C4a;
    d_C4a = 0.000221666667;
  C4R_degradation_A: C4Ra => ; d_C4Ra*C4Ra;
    d_C4Ra = 0.002;
  mC4R_degradation_A: mC4Ra => ; d_mC4Ra*mC4Ra;
    d_mC4Ra = 0.139;
  C4_complex_degradation_A: C4Compa => ; d_C4Compa*C4Compa;
    d_C4Compa = 0.002;
  C4_degradation_external: C4ext => ; d_C4ext*C4ext;
    d_C4ext = 0.000221666667;
  DimC4_degradation_A: DimC4a => ; d_DimC4a*DimC4a;
    d_DimC4a = 0.002;
  C14R_dimer_promoter_binding_A: DimC14a + Pcina -> PcinC14a; kf_gSTARC14Compa*DimC14a*Pcina - kr_gSTARC14Compa*PcinC14a; C14R_dimer_promoter_binding_A is "C14R dimer-promoter binding A";
    kf_gSTARC14Compa = 0.25; kr_gSTARC14Compa = 10;
  Induced_STAR_transcription_A: RNAPa + PcinC14a => RNAPa + PcinC14a + STARa; k_iSTARa*RNAPa*PcinC14a;
    k_iSTARa = 18.57;
  Basal_STAR_transcription_A: RNAPa + Pcina => RNAPa + Pcina + STARa; k_STARa*RNAPa*Pcina;
    k_STARa = 0.091;
  STAR_degradation_A: STARa => ; d_STARa*STARa;
    d_STARa = 0.139;
  C4R_dimer_promoter_binding_A: DimC4a + Prhla -> PrhlC4a; kf_gSTARC4Compa*DimC4a*Prhla - kr_gSTARC4Compa*PrhlC4a; C4R_dimer_promoter_binding_A is "C4R dimer-promoter binding A";
    kf_gSTARC4Compa = 0.25; kr_gSTARC4Compa = 10;
  Induced_antiSTAR_transcription_A: RNAPa + PrhlC4a => PrhlC4a + RNAPa + antiSTARa; k_iantiSTARa*RNAPa*PrhlC4a;
    k_iantiSTARa = 18.57;
  Basal_antiSTAR_transcription_A: RNAPa + Prhla => Prhla + antiSTARa + RNAPa; k_antiSTARa*RNAPa*Prhla;
    k_antiSTARa = 0.091;
  antiSTAR_degradation_A: antiSTARa => ; d_antiSTARa*antiSTARa;
    d_antiSTARa = 0.139;
  STAR_sequestration_A: STARa + antiSTARa -> STARseqa; kf_STARANTISTARa*STARa*antiSTARa - kr_STARANTISTARa*STARseqa;
    kf_STARANTISTARa = 62; kr_STARANTISTARa = 2;
  STAR_target_binding_A: Pad1a + STARa -> Pstarad1a; kf_STARAD1a*Pad1a*STARa - kr_STARAD1a*Pstarad1a; STAR_target_binding_A is "STAR-target binding A";
    kf_STARAD1a = 62; kr_STARAD1a = 2;
  STAR_induced_mGP2_transcription_A: RNAPa + Pstarad1a => RNAPa + Pstarad1a + mGP2a; k_imGP2a*RNAPa*Pstarad1a; STAR_induced_mGP2_transcription_A is "STAR-induced mGP2 transcription A";
    k_imGP2a = 6.56;
  STAR_complex_degradation_A: STARseqa => ; d_STARseqa*STARseqa;
    d_STARseqa = 0.139;
  mGP2_degradation_A: mGP2a => ; d_mGP2a*mGP2a;
    d_mGP2a = 0.139;
  Basal_mGP2_transcription_A: Pad1a + RNAPa => Pad1a + RNAPa + mGP2a; k_mGP2a*Pad1a*RNAPa;
    k_mGP2a = 0.069;
  preGP2_translation_A: mGP2a => preGP2a; preGP2_translation_A_kf*mGP2a;
    preGP2_translation_A_kf = 11.2;
  GP2_maturation_A: preGP2a => GP2a; GP2_maturation_A_kf*preGP2a;
    GP2_maturation_A_kf = 0.16;
  GP2_degradation_A: GP2a => ; GP2_degradation_A_kf*GP2a;
    GP2_degradation_A_kf = 0.0008316;
  preGP2_degradation: preGP2a => ; preGP2_degradation_kf*preGP2a;
    preGP2_degradation_kf = 0.0008316;
  RNAP_sequestration_A: GP2a + RNAPa -> GP2RNAPa; RNAP_sequestration_A_kf*GP2a*RNAPa - RNAP_sequestration_A_kr*GP2RNAPa;
    RNAP_sequestration_A_kf = 9441; RNAP_sequestration_A_kr = 30;
  Sequestered_RNAP_GP2_degradation_A: GP2RNAPa => ; Sequestered_RNAP_GP2_degradation_A_kf*GP2RNAPa; Sequestered_RNAP_GP2_degradation_A is "Sequestered RNAP-GP2 degradation A";
    Sequestered_RNAP_GP2_degradation_A_kf = 0.0008316;
  RNAP_degradation_A: RNAPa => ; RNAP_degradation_A_kf*RNAPa;
    RNAP_degradation_A_kf = 0.0008316;
  mRNAP_transcription_A: => mRNAPa; mRNAP_transcription_A_kf;
    mRNAP_transcription_A_kf = 2400;
  RNAP_translation_A: mRNAPa => RNAPa; RNAP_translation_A_kf*mRNAPa;
    RNAP_translation_A_kf = 840;
  mRNAP_degradation_A: mRNAPa => ; mRNAP_degradation_A_kf*mRNAPa;
    mRNAP_degradation_A_kf = 0.139;
  C4_production_B: => C4b; C4_production_B_kf;
    C4_production_B_kf = 322;
  C4_diffusion_B: C4b -> C4ext; C4_diff*(C4b - C4ext);
  C4_complex_formation_B: C4b + C4Rb -> C4Compb; C4_complex_formation_B_kf*C4b*C4Rb - C4_complex_formation_B_kr*C4Compb;
    C4_complex_formation_B_kf = 0.25; C4_complex_formation_B_kr = 10;
  C4_complex_dimerization_B: 2 C4Compb -> DimC4b; C4_complex_dimerization_B_kf*C4Compb^2 - C4_complex_dimerization_B_kr*DimC4b;
    C4_complex_dimerization_B_kf = 50000000; C4_complex_dimerization_B_kr = 1;
  mC4R_transcription_B: RNAPb + Pc4rb => RNAPb + Pc4rb + mC4Rb; mC4R_transcription_B_kf*RNAPb*Pc4rb;
    mC4R_transcription_B_kf = 2.23;
  C4R_translation_B: mC4Rb => C4Rb; C4R_translation_B_kf*mC4Rb;
    C4R_translation_B_kf = 2.99;
  C4R_degradation_B: C4Rb => ; C4R_degradation_B_kf*C4Rb;
    C4R_degradation_B_kf = 0.002;
  mC4R_degradation_B: mC4Rb => ; mC4R_degradation_B_kf*mC4Rb;
    mC4R_degradation_B_kf = 0.139;
  C4Comp_degradation_B: C4Compb => ; C4Comp_degradation_B_kf*C4Compb;
    C4Comp_degradation_B_kf = 0.002;
  C4_degradation_B: C4b => ; C4_degradation_B_kf*C4b;
    C4_degradation_B_kf = 0.000221666667;
  C14_diffusion_B: C14ext -> C14b; C14_diff*(C14ext - C14b);
  mC14R_transcription_B: RNAPb + Pc14rb => RNAPb + Pc14rb + mC14Rb; mC14R_transcription_B_kf*RNAPb*Pc14rb;
    mC14R_transcription_B_kf = 2.23;
  C14R_translation_B: mC14Rb => C14Rb; C14R_translation_B_kf*mC14Rb;
    C14R_translation_B_kf = 2.99;
  C14_complex_formation_B: C14b + C14Rb -> C14Compb; C14_complex_formation_B_kf*C14b*C14Rb - C14_complex_formation_B_kr*C14Compb;
    C14_complex_formation_B_kf = 0.25; C14_complex_formation_B_kr = 10;
  C14_complex_dimerization_B: 2 C14Compb -> DimC14b; C14_complex_dimerization_B_kf*C14Compb^2 - C14_complex_dimerization_B_kr*DimC14b;
    C14_complex_dimerization_B_kf = 50000000; C14_complex_dimerization_B_kr = 1;
  C14_degradation_B: C14b => ; C14_degradation_B_kf*C14b;
    C14_degradation_B_kf = 0.000283333333;
  C14R_degradation_B: C14Rb => ; C14R_degradation_B_kf*C14Rb;
    C14R_degradation_B_kf = 0.002;
  mC14R_degradation_B: mC14Rb => ; mC14R_degradation_B_kf*mC14Rb;
    mC14R_degradation_B_kf = 0.139;
  C14Comp_degradation_B: C14Compb => ; C14Comp_degradation_B_kf*C14Compb;
    C14Comp_degradation_B_kf = 0.002;
  DimC14_degradation_B: DimC14b => ; DimC14_degradation_B_kf*DimC14b;
    DimC14_degradation_B_kf = 0.002;
  DimC4_degradation_B: DimC4b => ; DimC4_degradation_B_kf*DimC4b;
    DimC4_degradation_B_kf = 0.002;
  C14R_dimer_promoter_binding_B: DimC14b + Pcinb -> PcinC14b; C14R_dimer_promoter_binding_B_kf*DimC14b*Pcinb - C14R_dimer_promoter_binding_B_kr*PcinC14b; C14R_dimer_promoter_binding_B is "C14R dimer-promoter binding B";
    C14R_dimer_promoter_binding_B_kf = 0.25; C14R_dimer_promoter_binding_B_kr = 10;
  Induced_aSTAR_transcription_B: RNAPb + PcinC14b => RNAPb + PcinC14b + antiSTARb; Induced_aSTAR_transcription_B_kf*RNAPb*PcinC14b;
    Induced_aSTAR_transcription_B_kf = 18.57;
  Basal_aSTAR_transcription_B: RNAPb + Pcinb => RNAPb + Pcinb + antiSTARb; Basal_aSTAR_transcription_B_kf*RNAPb*Pcinb;
    Basal_aSTAR_transcription_B_kf = 0.091;
  aSTAR_degradation_B: antiSTARb => ; aSTAR_degradation_B_kf*antiSTARb;
    aSTAR_degradation_B_kf = 0.139;
  C4R_dimer_promoter_binding_B: DimC4b + Prhlb -> PrhlC4b; C4R_dimer_promoter_binding_B_kf*DimC4b*Prhlb - C4R_dimer_promoter_binding_B_kr*PrhlC4b; C4R_dimer_promoter_binding_B is "C4R dimer-promoter binding B";
    C4R_dimer_promoter_binding_B_kf = 0.25; C4R_dimer_promoter_binding_B_kr = 10;
  Induced_STAR_transcription_B: RNAPb + PrhlC4b => RNAPb + PrhlC4b + STARb; Induced_STAR_transcription_B_kf*RNAPb*PrhlC4b;
    Induced_STAR_transcription_B_kf = 18.57;
  Basal_STAR_transcription_B: RNAPb + Prhlb => RNAPb + Prhlb + STARb; Basal_STAR_transcription_B_kf*RNAPb*Prhlb;
    Basal_STAR_transcription_B_kf = 0.091;
  STAR_degradation_B: STARb => ; STAR_degradation_B_kf*STARb;
    STAR_degradation_B_kf = 0.139;
  STAR_sequestration_B: STARb + antiSTARb -> STARseqb; STAR_sequestration_B_kf*STARb*antiSTARb - STAR_sequestration_B_kr*STARseqb;
    STAR_sequestration_B_kf = 62; STAR_sequestration_B_kr = 2;
  STAR_target_binding_B: Pad1b + STARb -> Pstarad1b; STAR_target_binding_B_kf*Pad1b*STARb - STAR_target_binding_B_kr*Pstarad1b; STAR_target_binding_B is "STAR-target binding B";
    STAR_target_binding_B_kf = 62; STAR_target_binding_B_kr = 2;
  STAR_activated_mGP2_transcription_B: RNAPb + Pstarad1b => RNAPb + Pstarad1b + mGP2b; STAR_activated_mGP2_transcription_B_kf*RNAPb*Pstarad1b; STAR_activated_mGP2_transcription_B is "STAR-activated mGP2 transcription B";
    STAR_activated_mGP2_transcription_B_kf = 8.5;
  STAR_aSTAR_complex_degradation_B: STARseqb => ; STAR_aSTAR_complex_degradation_B_kf*STARseqb; STAR_aSTAR_complex_degradation_B is "STAR-aSTAR complex degradation B";
    STAR_aSTAR_complex_degradation_B_kf = 0.139;
  mGP2_degradation_B: mGP2b => ; mGP2_degradation_B_kf*mGP2b;
    mGP2_degradation_B_kf = 0.139;
  Basal_mGP2_transcription_B: Pad1b + RNAPb => Pad1b + RNAPb + mGP2b; Basal_mGP2_transcription_B_kf*Pad1b*RNAPb;
    Basal_mGP2_transcription_B_kf = 0.069;
  preGP2_translation_B: mGP2b => preGP2b; preGP2_translation_B_kf*mGP2b;
    preGP2_translation_B_kf = 11.2;
  GP2_maturation_B: preGP2b => GP2b; GP2_maturation_B_kf*preGP2b;
    GP2_maturation_B_kf = 0.16;
  RNAP_sequestration_B: GP2b + RNAPb -> GP2RNAPb; RNAP_sequestration_B_kf*GP2b*RNAPb - RNAP_sequestration_B_kr*GP2RNAPb;
    RNAP_sequestration_B_kf = 9441; RNAP_sequestration_B_kr = 30;
  GP2_degradation_B: GP2b => ; GP2_degradation_B_kf*GP2b;
    GP2_degradation_B_kf = 0.0008316;
  preGP2_degradation_B: preGP2b => ; preGP2_degradation_B_kf*preGP2b;
    preGP2_degradation_B_kf = 0.0008316;
  GP2RNAP_degradation_B: GP2RNAPb => ; GP2RNAP_degradation_B_kf*GP2RNAPb;
    GP2RNAP_degradation_B_kf = 0.0008316;
  mRNAP_transcription_B: => mRNAPb; mRNAP_transcription_B_kf;
    mRNAP_transcription_B_kf = 2400;
  RNAP_translation_B: mRNAPb => RNAPb; RNAP_translation_B_kf*mRNAPb;
    RNAP_translation_B_kf = 840;
  mRNAP_degradation_B: mRNAPb => ; mRNAP_degradation_B_kf*mRNAPb;
    mRNAP_degradation_B_kf = 0.139;
  RNAP_degradation_B: RNAPb => ; RNAP_degradation_B_kf*RNAPb;
    RNAP_degradation_B_kf = 0.0008316;
end
